*Heading
** Job name: Job-1 Model name: Building
** Generated by: Abaqus/CAE Version 6.8-2
*Preprint, echo=NO, model=NO, history=NO, contact=NO
**
** PARAMETERS
**
*PARAMETER
speed = 35
p_max = 0.6284*speed**2
l=22.5
h_floor = 3.6

z_1 = 1.5*h_floor
z_2 = 2.5*h_floor
z_3 = 3.5*h_floor
z_4 = 4.5*h_floor
z_5 = 5.5*h_floor
z_6 = 6*h_floor

coeff=-1/(2*0.143+1)*(p_max*l)/(z_6**(2*0.143))
F_1=coeff*z_1**(2*0.143+1)
F_2=coeff*(z_2**(2*0.143+1)-z_1**(2*0.143+1))
F_3=coeff*(z_3**(2*0.143+1)-z_2**(2*0.143+1))
F_4=coeff*(z_4**(2*0.143+1)-z_3**(2*0.143+1))
F_5=coeff*(z_5**(2*0.143+1)-z_4**(2*0.143+1))
F_6=coeff*(z_6**(2*0.143+1)-z_5**(2*0.143+1))

nodal_force_floor1 = F_1/35
nodal_force_floor2 = F_2/35
nodal_force_floor3 = F_3/35
nodal_force_floor4 = F_4/35
nodal_force_floor5 = F_5/35
nodal_force_floor6 = F_6/35

**
** PARTS
**
*Part, name=PART-1-1
*Node
      1,         -12.,        -19.5,          -8.
      2,        -10.5,        -19.5,          -8.
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*Element, type=C3D8I
  1,    1,    2,   24,   23,  485,  486,  508,  507
  2,    2,    3,   25,   24,  486,  487,  509,  508
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*Element, type=B31
2060,  1533,  2813
2061,  2813,  2814
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*Element, type=S4
 883,  1015,  1016,  1038,  1037
 884,  1016,  1017,  1039,  1038
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*Elset, elset=ALL, generate
    1,  9299,     1
*Elset, elset=BAR_COLUMNS
 2060, 2061, 2062, 2063, 2064, 2065
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*Elset, elset=PSHELL_CELLAR, generate
  883,  1291,     1
*Elset, elset=PSHELL_FLOORS, generate
 2396,  9043,     1
*Elset, elset=PSHELL_STAIRS
 1292, 1293, 1294, 1295, 1296, 1297
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*Elset, elset=PSOLID_1, generate
   1,  882,    1
*Elset, elset=Floor1, generate
 2396,  3503,     1
*Elset, elset=Floor2, generate
 3504,  4611,     1
*Elset, elset=Floor3, generate
 4612,  5719,     1
*Elset, elset=Floor4, generate
 5720,  6827,     1
*Elset, elset=Floor5, generate
 6828,  7935,     1
*Elset, elset=Floor6, generate
 7936,  9043,     1
*Elset, elset=Stairs_floor1, generate
 1292,  1419,     1
*Elset, elset=Stairs_floor2, generate
 1420,  1547,     1
*Elset, elset=Stairs_floor3, generate
 1548,  1675,     1
*Elset, elset=Stairs_floor4, generate
 1676,  1803,     1
*Elset, elset=Stairs_floor5, generate
 1804,  1931,     1
*Elset, elset=Stairs_floor6, generate
 1932,  2059,     1
*Elset, elset=Stairs_ceil, generate
 9148,  9299,     1
*Elset, elset=Col_1_Floor_1
 9044, 9045, 9046, 9047
*Elset, elset=Col_2_Floor_1
 9048, 9049, 9050, 9051
*Elset, elset=Col_3_Floor_1
 9052, 9053, 9054, 9055
*Elset, elset=Col_4_Floor_1
 9056, 9057, 9058, 9059
*Elset, elset=Col_5_Floor_1
 9060, 9061, 9062, 9063
*Elset, elset=Col_6_Floor_1
 9092, 9093, 9094, 9095
*Elset, elset=Col_7_Floor_1
 9096, 9097, 9098, 9099
*Elset, elset=Col_8_Floor_1
 9072, 9073, 9074, 9075
*Elset, elset=Col_9_Floor_1
 9064, 9065, 9066, 9067
*Elset, elset=Col_10_Floor_1
 9140, 9141, 9142, 9143
*Elset, elset=Col_11_Floor_1
 9144, 9145, 9146, 9147
*Elset, elset=Col_12_Floor_1
 9076, 9077, 9078, 9079
*Elset, elset=Col_13_Floor_1
 9068, 9069, 9070, 9071
*Elset, elset=Col_14_Floor_1
 9084, 9085, 9086, 9087
*Elset, elset=Col_15_Floor_1
 9088, 9089, 9090, 9091
*Elset, elset=Col_16_Floor_1
 9080, 9081, 9082, 9083
*Elset, elset=Col_1_Floor_2
 2060, 2061, 2062, 2063
*Elset, elset=Col_2_Floor_2
 2064, 2065, 2066, 2067
*Elset, elset=Col_3_Floor_2
 2068, 2069, 2070, 2071
*Elset, elset=Col_4_Floor_2
 2072, 2073, 2074, 2075
*Elset, elset=Col_5_Floor_2
 2076, 2077, 2078, 2079
*Elset, elset=Col_6_Floor_2
 2108, 2109, 2110, 2111
*Elset, elset=Col_7_Floor_2
 2112, 2113, 2114, 2115
*Elset, elset=Col_8_Floor_2
 2088, 2089, 2090, 2091
*Elset, elset=Col_9_Floor_2
 2080, 2081, 2082, 2083
*Elset, elset=Col_10_Floor_2
 9100, 9101, 9102, 9103
*Elset, elset=Col_11_Floor_2
 9104, 9105, 9106, 9107
*Elset, elset=Col_12_Floor_2
 2092, 2093, 2094, 2095
*Elset, elset=Col_13_Floor_2
 2084, 2085, 2086, 2087
*Elset, elset=Col_14_Floor_2
 2100, 2101, 2102, 2103
*Elset, elset=Col_15_Floor_2
 2104, 2105, 2106, 2107
*Elset, elset=Col_16_Floor_2
 2096, 2097, 2098, 2099
*Elset, elset=Col_1_Floor_3
 2142, 2155, 2165, 2171
*Elset, elset=Col_2_Floor_3
 2139, 2153, 2163, 2170
*Elset, elset=Col_3_Floor_3
 2137, 2151, 2161, 2169
*Elset, elset=Col_4_Floor_3
 2136, 2150, 2160, 2168
*Elset, elset=Col_5_Floor_3
 2130, 2144, 2158, 2167
*Elset, elset=Col_6_Floor_3
 2129, 2143, 2156, 2166
*Elset, elset=Col_7_Floor_3
 2127, 2140, 2154, 2164
*Elset, elset=Col_8_Floor_3
 2126, 2138, 2152, 2162
*Elset, elset=Col_9_Floor_3
 2122, 2133, 2147, 2159
*Elset, elset=Col_10_Floor_3
 9108, 9109, 9110, 9111
*Elset, elset=Col_11_Floor_3
 9112, 9113, 9114, 9115
*Elset, elset=Col_12_Floor_3
 2120, 2128, 2141, 2157
*Elset, elset=Col_13_Floor_3
 2119, 2125, 2135, 2149
*Elset, elset=Col_14_Floor_3
 2118, 2124, 2134, 2148
*Elset, elset=Col_15_Floor_3
 2117, 2123, 2132, 2146
*Elset, elset=Col_16_Floor_3
 2116, 2121, 2131, 2145
*Elset, elset=Col_1_Floor_4
 2198, 2211, 2221, 2227
*Elset, elset=Col_2_Floor_4
 2195, 2209, 2219, 2226
*Elset, elset=Col_3_Floor_4
 2193, 2207, 2217, 2225
*Elset, elset=Col_4_Floor_4
 2192, 2206, 2216, 2224
*Elset, elset=Col_5_Floor_4
 2186, 2200, 2214, 2223
*Elset, elset=Col_6_Floor_4
 2185, 2199, 2212, 2222
*Elset, elset=Col_7_Floor_4
 2183, 2196, 2210, 2220
*Elset, elset=Col_8_Floor_4
 2182, 2194, 2208, 2218
*Elset, elset=Col_9_Floor_4
 2178, 2189, 2203, 2215
*Elset, elset=Col_10_Floor_4
 9116, 9117, 9118, 9119
*Elset, elset=Col_11_Floor_4
 9120, 9121, 9122, 9123
*Elset, elset=Col_12_Floor_4
 2176, 2184, 2197, 2213
*Elset, elset=Col_13_Floor_4
 2175, 2181, 2191, 2205
*Elset, elset=Col_14_Floor_4
 2174, 2180, 2190, 2204
*Elset, elset=Col_15_Floor_4
 2173, 2179, 2188, 2202
*Elset, elset=Col_16_Floor_4
 2172, 2177, 2187, 2201
*Elset, elset=Col_1_Floor_5
 2254, 2267, 2277, 2283
*Elset, elset=Col_2_Floor_5
 2251, 2265, 2275, 2282
*Elset, elset=Col_3_Floor_5
 2249, 2263, 2273, 2281
*Elset, elset=Col_4_Floor_5
 2248, 2262, 2272, 2280
*Elset, elset=Col_5_Floor_5
 2242, 2256, 2270, 2279
*Elset, elset=Col_6_Floor_5
 2241, 2255, 2268, 2278
*Elset, elset=Col_7_Floor_5
 2239, 2252, 2266, 2276
*Elset, elset=Col_8_Floor_5
 2238, 2250, 2264, 2274
*Elset, elset=Col_9_Floor_5
 2234, 2245, 2259, 2271
*Elset, elset=Col_10_Floor_5
 9124, 9125, 9126, 9127
*Elset, elset=Col_11_Floor_5
 9128, 9129, 9130, 9131
*Elset, elset=Col_12_Floor_5
 2232, 2240, 2253, 2269
*Elset, elset=Col_13_Floor_5
 2231, 2237, 2247, 2261
*Elset, elset=Col_14_Floor_5
 2230, 2236, 2246, 2260
*Elset, elset=Col_15_Floor_5
 2229, 2235, 2244, 2258
*Elset, elset=Col_16_Floor_5
 2228, 2233, 2243, 2257
*Elset, elset=Col_1_Floor_6
 2310, 2323, 2333, 2339
*Elset, elset=Col_2_Floor_6
 2307, 2321, 2331, 2338
*Elset, elset=Col_3_Floor_6
 2305, 2319, 2329, 2337
*Elset, elset=Col_4_Floor_6
 2304, 2318, 2328, 2336
*Elset, elset=Col_5_Floor_6
 2298, 2312, 2326, 2335
*Elset, elset=Col_6_Floor_6
 2297, 2311, 2324, 2334
*Elset, elset=Col_7_Floor_6
 2295, 2308, 2322, 2332
*Elset, elset=Col_8_Floor_6
 2294, 2306, 2320, 2330
*Elset, elset=Col_9_Floor_6
 2290, 2301, 2315, 2327
*Elset, elset=Col_10_Floor_6
 9132, 9133, 9134, 9135
*Elset, elset=Col_11_Floor_6
 9136, 9137, 9138, 9139
*Elset, elset=Col_12_Floor_6
 2288, 2296, 2309, 2325
*Elset, elset=Col_13_Floor_6
 2287, 2293, 2303, 2317
*Elset, elset=Col_14_Floor_6
 2286, 2292, 2302, 2316
*Elset, elset=Col_15_Floor_6
 2285, 2291, 2300, 2314
*Elset, elset=Col_16_Floor_6
 2284, 2289, 2299, 2313
*Nset, nset=Soil_nodes, generate
    1,  1452,     1
*Nset, nset=Side_floor1
 3674, 3675, 3676, 3677, 3678, 3679
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*Nset, nset=Side_floor2
 4946, 4947, 4948, 4949, 4950, 4951
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*Nset, nset=Side_floor3
 6218, 6219, 6220, 6221, 6222, 6223
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*Nset, nset=Side_floor4
 7490, 7491, 7492, 7493, 7494, 7495
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*Nset, nset=Side_floor5
 8762, 8763, 8764, 8765, 8766, 8767
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*Nset, nset=Side_floor6
 10034, 10035, 10036, 10037, 10038, 10039
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*Elset, elset=_Side_ceil_SPOS, internal, generate
 9212,  9251,     1
*Surface, type=ELEMENT, name=Side_ceil
_Side_ceil_SPOS, SPOS
** Section: Section-ASSEMBLY_PART-1-1_PSOLID_1
*Solid Section, elset=PSOLID_1, material=SOIL
1.,
** Section: Section-ASSEMBLY_PART-1-1_PSHELL_CELLAR
*Shell Section, elset=PSHELL_CELLAR, material=CELLAR_MAT
1., 5
** Section: Section-ASSEMBLY_PART-1-1_Stairs_floor1
*Shell Section, elset=Stairs_floor1, material=STAIRS_1
1., 5
** Section: Section-ASSEMBLY_PART-1-1_Stairs_floor2
*Shell Section, elset=Stairs_floor2, material=STAIRS_2
1., 5
** Section: Section-ASSEMBLY_PART-1-1_Stairs_floor3
*Shell Section, elset=Stairs_floor3, material=STAIRS_3
1., 5
** Section: Section-ASSEMBLY_PART-1-1_Stairs_floor4
*Shell Section, elset=Stairs_floor4, material=STAIRS_4
1., 5
** Section: Section-ASSEMBLY_PART-1-1_Stairs_floor5
*Shell Section, elset=Stairs_floor5, material=STAIRS_5
1., 5
** Section: Section-ASSEMBLY_PART-1-1_Stairs_floor6
*Shell Section, elset=Stairs_floor6, material=STAIRS_6
1., 5
** Section: Section-ASSEMBLY_PART-1-1_Stairs_ceil
*Shell Section, elset=Stairs_ceil, material=STAIRS_CEIL
1., 5
** Section: Section-ASSEMBLY_PART-1-1_Floor1
*Shell Section, elset=Floor1, material=FLOOR_1
1., 5
** Section: Section-ASSEMBLY_PART-1-1_Floor2
*Shell Section, elset=Floor2, material=FLOOR_2
1., 5
** Section: Section-ASSEMBLY_PART-1-1_Floor3
*Shell Section, elset=Floor3, material=FLOOR_3
1., 5
** Section: Section-ASSEMBLY_PART-1-1_Floor4
*Shell Section, elset=Floor4, material=FLOOR_4
1., 5
** Section: Section-ASSEMBLY_PART-1-1_Floor5
*Shell Section, elset=Floor5, material=FLOOR_5
1., 5
** Section: Section-ASSEMBLY_PART-1-1_Floor6
*Shell Section, elset=Floor6, material=FLOOR_6
1., 5
** Section asignement for each column
** Section: Section-ASSEMBLY_PART-1-1_Col_1_Floor_1  Profile: Profile-ASSEMBLY_PART-1-1_Col_1_Floor_1
*Beam General Section, elset=Col_1_Floor_1, density= 2.500e+03, section=RECT
 4.000e-01,  4.000e-01
1.,0.,0.
 3.500e+10,  1.400e+10
*SECTION POINTS
 1.8, 1.8, 1.8, -1.8, -1.8, -1.8, -1.8, 1.8
*SECTION POINTS
 1.8, 1.8, 1.8, -1.8, -1.8, -1.8, -1.8, 1.8
** Section: Section-ASSEMBLY_PART-1-1_Col_2_Floor_1  Profile: Profile-ASSEMBLY_PART-1-1_Col_2_Floor_1
*Beam General Section, elset=Col_2_Floor_1, density= 2.500e+03, section=RECT
 4.000e-01,  4.000e-01
1.,0.,0.
 3.500e+10,  1.400e+10
*SECTION POINTS
 1.8, 1.8, 1.8, -1.8, -1.8, -1.8, -1.8, 1.8
*SECTION POINTS
 1.8, 1.8, 1.8, -1.8, -1.8, -1.8, -1.8, 1.8
** Section: Section-ASSEMBLY_PART-1-1_Col_3_Floor_1  Profile: Profile-ASSEMBLY_PART-1-1_Col_3_Floor_1
*Beam General Section, elset=Col_3_Floor_1, density= 2.500e+03, section=RECT
 4.000e-01,  4.000e-01
1.,0.,0.
 3.500e+10,  1.400e+10
*SECTION POINTS
 1.8, 1.8, 1.8, -1.8, -1.8, -1.8, -1.8, 1.8
*SECTION POINTS
 1.8, 1.8, 1.8, -1.8, -1.8, -1.8, -1.8, 1.8
** Section: Section-ASSEMBLY_PART-1-1_Col_4_Floor_1  Profile: Profile-ASSEMBLY_PART-1-1_Col_4_Floor_1
*Beam General Section, elset=Col_4_Floor_1, density= 2.500e+03, section=RECT
 4.000e-01,  4.000e-01
1.,0.,0.
 3.500e+10,  1.400e+10
*SECTION POINTS
 1.8, 1.8, 1.8, -1.8, -1.8, -1.8, -1.8, 1.8
** Section: Section-ASSEMBLY_PART-1-1_Col_5_Floor_1  Profile: Profile-ASSEMBLY_PART-1-1_Col_5_Floor_1
*Beam General Section, elset=Col_5_Floor_1, density= 2.500e+03, section=RECT
 4.000e-01,  4.000e-01
1.,0.,0.
 3.500e+10,  1.400e+10
*SECTION POINTS
 1.8, 1.8, 1.8, -1.8, -1.8, -1.8, -1.8, 1.8
** Section: Section-ASSEMBLY_PART-1-1_Col_6_Floor_1  Profile: Profile-ASSEMBLY_PART-1-1_Col_6_Floor_1
*Beam General Section, elset=Col_6_Floor_1, density= 2.500e+03, section=RECT
 4.000e-01,  4.000e-01
1.,0.,0.
 3.500e+10,  1.400e+10
*SECTION POINTS
 1.8, 1.8, 1.8, -1.8, -1.8, -1.8, -1.8, 1.8
** Section: Section-ASSEMBLY_PART-1-1_Col_7_Floor_1  Profile: Profile-ASSEMBLY_PART-1-1_Col_7_Floor_1
*Beam General Section, elset=Col_7_Floor_1, density= 2.500e+03, section=RECT
 4.000e-01,  4.000e-01
1.,0.,0.
 3.500e+10,  1.400e+10
*SECTION POINTS
 1.8, 1.8, 1.8, -1.8, -1.8, -1.8, -1.8, 1.8
** Section: Section-ASSEMBLY_PART-1-1_Col_8_Floor_1  Profile: Profile-ASSEMBLY_PART-1-1_Col_8_Floor_1
*Beam General Section, elset=Col_8_Floor_1, density= 2.500e+03, section=RECT
 4.000e-01,  4.000e-01
1.,0.,0.
 3.500e+10,  1.400e+10
*SECTION POINTS
 1.8, 1.8, 1.8, -1.8, -1.8, -1.8, -1.8, 1.8
** Section: Section-ASSEMBLY_PART-1-1_Col_9_Floor_1  Profile: Profile-ASSEMBLY_PART-1-1_Col_9_Floor_1
*Beam General Section, elset=Col_9_Floor_1, density= 2.500e+03, section=RECT
 4.000e-01,  4.000e-01
1.,0.,0.
 3.500e+10,  1.400e+10
*SECTION POINTS
 1.8, 1.8, 1.8, -1.8, -1.8, -1.8, -1.8, 1.8
** Section: Section-ASSEMBLY_PART-1-1_Col_10_Floor_1  Profile: Profile-ASSEMBLY_PART-1-1_Col_10_Floor_1
*Beam General Section, elset=Col_10_Floor_1, density= 2.500e+03, section=RECT
 4.000e-01,  4.000e-01
1.,0.,0.
 3.500e+10,  1.400e+10
*SECTION POINTS
 1.8, 1.8, 1.8, -1.8, -1.8, -1.8, -1.8, 1.8
** Section: Section-ASSEMBLY_PART-1-1_Col_11_Floor_1  Profile: Profile-ASSEMBLY_PART-1-1_Col_11_Floor_1
*Beam General Section, elset=Col_11_Floor_1, density= 2.500e+03, section=RECT
 4.000e-01,  4.000e-01
1.,0.,0.
 3.500e+10,  1.400e+10
*SECTION POINTS
 1.8, 1.8, 1.8, -1.8, -1.8, -1.8, -1.8, 1.8
** Section: Section-ASSEMBLY_PART-1-1_Col_12_Floor_1  Profile: Profile-ASSEMBLY_PART-1-1_Col_12_Floor_1
*Beam General Section, elset=Col_12_Floor_1, density= 2.500e+03, section=RECT
 4.000e-01,  4.000e-01
1.,0.,0.
 3.500e+10,  1.400e+10
*SECTION POINTS
 1.8, 1.8, 1.8, -1.8, -1.8, -1.8, -1.8, 1.8
** Section: Section-ASSEMBLY_PART-1-1_Col_13_Floor_1  Profile: Profile-ASSEMBLY_PART-1-1_Col_13_Floor_1
*Beam General Section, elset=Col_13_Floor_1, density= 2.500e+03, section=RECT
 4.000e-01,  4.000e-01
1.,0.,0.
 3.500e+10,  1.400e+10
*SECTION POINTS
 1.8, 1.8, 1.8, -1.8, -1.8, -1.8, -1.8, 1.8
** Section: Section-ASSEMBLY_PART-1-1_Col_14_Floor_1  Profile: Profile-ASSEMBLY_PART-1-1_Col_14_Floor_1
*Beam General Section, elset=Col_14_Floor_1, density= 2.500e+03, section=RECT
 4.000e-01,  4.000e-01
1.,0.,0.
 3.500e+10,  1.400e+10
*SECTION POINTS
 1.8, 1.8, 1.8, -1.8, -1.8, -1.8, -1.8, 1.8
** Section: Section-ASSEMBLY_PART-1-1_Col_15_Floor_1  Profile: Profile-ASSEMBLY_PART-1-1_Col_15_Floor_1
*Beam General Section, elset=Col_15_Floor_1, density= 2.500e+03, section=RECT
 4.000e-01,  4.000e-01
1.,0.,0.
 3.500e+10,  1.400e+10
*SECTION POINTS
 1.8, 1.8, 1.8, -1.8, -1.8, -1.8, -1.8, 1.8
** Section: Section-ASSEMBLY_PART-1-1_Col_16_Floor_1  Profile: Profile-ASSEMBLY_PART-1-1_Col_16_Floor_1
*Beam General Section, elset=Col_16_Floor_1, density= 2.500e+03, section=RECT
 4.000e-01,  4.000e-01
1.,0.,0.
 3.500e+10,  1.400e+10
*SECTION POINTS
 1.8, 1.8, 1.8, -1.8, -1.8, -1.8, -1.8, 1.8
** Section: Section-ASSEMBLY_PART-1-1_Col_1_Floor_2  Profile: Profile-ASSEMBLY_PART-1-1_Col_1_Floor_2
*Beam General Section, elset=Col_1_Floor_2, density= 2.500e+03, section=RECT
 4.000e-01,  4.000e-01
1.,0.,0.
 3.500e+10,  1.400e+10
*SECTION POINTS
 1.8, 1.8, 1.8, -1.8, -1.8, -1.8, -1.8, 1.8
** Section: Section-ASSEMBLY_PART-1-1_Col_2_Floor_2  Profile: Profile-ASSEMBLY_PART-1-1_Col_2_Floor_2
*Beam General Section, elset=Col_2_Floor_2, density= 2.500e+03, section=RECT
 4.000e-01,  4.000e-01
1.,0.,0.
 3.500e+10,  1.400e+10
*SECTION POINTS
 1.8, 1.8, 1.8, -1.8, -1.8, -1.8, -1.8, 1.8
** Section: Section-ASSEMBLY_PART-1-1_Col_3_Floor_2  Profile: Profile-ASSEMBLY_PART-1-1_Col_3_Floor_2
*Beam General Section, elset=Col_3_Floor_2, density= 2.500e+03, section=RECT
 4.000e-01,  4.000e-01
1.,0.,0.
 3.500e+10,  1.400e+10
*SECTION POINTS
 1.8, 1.8, 1.8, -1.8, -1.8, -1.8, -1.8, 1.8
** Section: Section-ASSEMBLY_PART-1-1_Col_4_Floor_2  Profile: Profile-ASSEMBLY_PART-1-1_Col_4_Floor_2
*Beam General Section, elset=Col_4_Floor_2, density= 2.500e+03, section=RECT
 4.000e-01,  4.000e-01
1.,0.,0.
 3.500e+10,  1.400e+10
*SECTION POINTS
 1.8, 1.8, 1.8, -1.8, -1.8, -1.8, -1.8, 1.8
** Section: Section-ASSEMBLY_PART-1-1_Col_5_Floor_2  Profile: Profile-ASSEMBLY_PART-1-1_Col_5_Floor_2
*Beam General Section, elset=Col_5_Floor_2, density= 2.500e+03, section=RECT
 4.000e-01,  4.000e-01
1.,0.,0.
 3.500e+10,  1.400e+10
*SECTION POINTS
 1.8, 1.8, 1.8, -1.8, -1.8, -1.8, -1.8, 1.8
** Section: Section-ASSEMBLY_PART-1-1_Col_6_Floor_2  Profile: Profile-ASSEMBLY_PART-1-1_Col_6_Floor_2
*Beam General Section, elset=Col_6_Floor_2, density= 2.500e+03, section=RECT
 4.000e-01,  4.000e-01
1.,0.,0.
 3.500e+10,  1.400e+10
*SECTION POINTS
 1.8, 1.8, 1.8, -1.8, -1.8, -1.8, -1.8, 1.8
** Section: Section-ASSEMBLY_PART-1-1_Col_7_Floor_2  Profile: Profile-ASSEMBLY_PART-1-1_Col_7_Floor_2
*Beam General Section, elset=Col_7_Floor_2, density= 2.500e+03, section=RECT
 4.000e-01,  4.000e-01
1.,0.,0.
 3.500e+10,  1.400e+10
*SECTION POINTS
 1.8, 1.8, 1.8, -1.8, -1.8, -1.8, -1.8, 1.8
** Section: Section-ASSEMBLY_PART-1-1_Col_8_Floor_2  Profile: Profile-ASSEMBLY_PART-1-1_Col_8_Floor_2
*Beam General Section, elset=Col_8_Floor_2, density= 2.500e+03, section=RECT
 4.000e-01,  4.000e-01
1.,0.,0.
 3.500e+10,  1.400e+10
*SECTION POINTS
 1.8, 1.8, 1.8, -1.8, -1.8, -1.8, -1.8, 1.8
** Section: Section-ASSEMBLY_PART-1-1_Col_9_Floor_2  Profile: Profile-ASSEMBLY_PART-1-1_Col_9_Floor_2
*Beam General Section, elset=Col_9_Floor_2, density= 2.500e+03, section=RECT
 4.000e-01,  4.000e-01
1.,0.,0.
 3.500e+10,  1.400e+10
*SECTION POINTS
 1.8, 1.8, 1.8, -1.8, -1.8, -1.8, -1.8, 1.8
** Section: Section-ASSEMBLY_PART-1-1_Col_10_Floor_2  Profile: Profile-ASSEMBLY_PART-1-1_Col_10_Floor_2
*Beam General Section, elset=Col_10_Floor_2, density= 2.500e+03, section=RECT
 4.000e-01,  4.000e-01
1.,0.,0.
 3.500e+10,  1.400e+10
*SECTION POINTS
 1.8, 1.8, 1.8, -1.8, -1.8, -1.8, -1.8, 1.8
** Section: Section-ASSEMBLY_PART-1-1_Col_11_Floor_2  Profile: Profile-ASSEMBLY_PART-1-1_Col_11_Floor_2
*Beam General Section, elset=Col_11_Floor_2, density= 2.500e+03, section=RECT
 4.000e-01,  4.000e-01
1.,0.,0.
 3.500e+10,  1.400e+10
*SECTION POINTS
 1.8, 1.8, 1.8, -1.8, -1.8, -1.8, -1.8, 1.8
** Section: Section-ASSEMBLY_PART-1-1_Col_12_Floor_2  Profile: Profile-ASSEMBLY_PART-1-1_Col_12_Floor_2
*Beam General Section, elset=Col_12_Floor_2, density= 2.500e+03, section=RECT
 4.000e-01,  4.000e-01
1.,0.,0.
 3.500e+10,  1.400e+10
*SECTION POINTS
 1.8, 1.8, 1.8, -1.8, -1.8, -1.8, -1.8, 1.8
** Section: Section-ASSEMBLY_PART-1-1_Col_13_Floor_2  Profile: Profile-ASSEMBLY_PART-1-1_Col_13_Floor_2
*Beam General Section, elset=Col_13_Floor_2, density= 2.500e+03, section=RECT
 4.000e-01,  4.000e-01
1.,0.,0.
 3.500e+10,  1.400e+10
*SECTION POINTS
 1.8, 1.8, 1.8, -1.8, -1.8, -1.8, -1.8, 1.8
** Section: Section-ASSEMBLY_PART-1-1_Col_14_Floor_2  Profile: Profile-ASSEMBLY_PART-1-1_Col_14_Floor_2
*Beam General Section, elset=Col_14_Floor_2, density= 2.500e+03, section=RECT
 4.000e-01,  4.000e-01
1.,0.,0.
 3.500e+10,  1.400e+10
*SECTION POINTS
 1.8, 1.8, 1.8, -1.8, -1.8, -1.8, -1.8, 1.8
** Section: Section-ASSEMBLY_PART-1-1_Col_15_Floor_2  Profile: Profile-ASSEMBLY_PART-1-1_Col_15_Floor_2
*Beam General Section, elset=Col_15_Floor_2, density= 2.500e+03, section=RECT
 4.000e-01,  4.000e-01
1.,0.,0.
 3.500e+10,  1.400e+10
*SECTION POINTS
 1.8, 1.8, 1.8, -1.8, -1.8, -1.8, -1.8, 1.8
** Section: Section-ASSEMBLY_PART-1-1_Col_16_Floor_2  Profile: Profile-ASSEMBLY_PART-1-1_Col_16_Floor_2
*Beam General Section, elset=Col_16_Floor_2, density= 2.500e+03, section=RECT
 4.000e-01,  4.000e-01
1.,0.,0.
 3.500e+10,  1.400e+10
*SECTION POINTS
 1.8, 1.8, 1.8, -1.8, -1.8, -1.8, -1.8, 1.8
** Section: Section-ASSEMBLY_PART-1-1_Col_1_Floor_3  Profile: Profile-ASSEMBLY_PART-1-1_Col_1_Floor_3
*Beam General Section, elset=Col_1_Floor_3, density= 2.500e+03, section=RECT
 4.000e-01,  4.000e-01
1.,0.,0.
 3.500e+10,  1.400e+10
*SECTION POINTS
 1.8, 1.8, 1.8, -1.8, -1.8, -1.8, -1.8, 1.8
** Section: Section-ASSEMBLY_PART-1-1_Col_2_Floor_3  Profile: Profile-ASSEMBLY_PART-1-1_Col_2_Floor_3
*Beam General Section, elset=Col_2_Floor_3, density= 2.500e+03, section=RECT
 4.000e-01,  4.000e-01
1.,0.,0.
 3.500e+10,  1.400e+10
*SECTION POINTS
 1.8, 1.8, 1.8, -1.8, -1.8, -1.8, -1.8, 1.8
** Section: Section-ASSEMBLY_PART-1-1_Col_3_Floor_3  Profile: Profile-ASSEMBLY_PART-1-1_Col_3_Floor_3
*Beam General Section, elset=Col_3_Floor_3, density= 2.500e+03, section=RECT
 4.000e-01,  4.000e-01
1.,0.,0.
 3.500e+10,  1.400e+10
*SECTION POINTS
 1.8, 1.8, 1.8, -1.8, -1.8, -1.8, -1.8, 1.8
** Section: Section-ASSEMBLY_PART-1-1_Col_4_Floor_3  Profile: Profile-ASSEMBLY_PART-1-1_Col_4_Floor_3
*Beam General Section, elset=Col_4_Floor_3, density= 2.500e+03, section=RECT
 4.000e-01,  4.000e-01
1.,0.,0.
 3.500e+10,  1.400e+10
*SECTION POINTS
 1.8, 1.8, 1.8, -1.8, -1.8, -1.8, -1.8, 1.8
** Section: Section-ASSEMBLY_PART-1-1_Col_5_Floor_3  Profile: Profile-ASSEMBLY_PART-1-1_Col_5_Floor_3
*Beam General Section, elset=Col_5_Floor_3, density= 2.500e+03, section=RECT
 4.000e-01,  4.000e-01
1.,0.,0.
 3.500e+10,  1.400e+10
*SECTION POINTS
 1.8, 1.8, 1.8, -1.8, -1.8, -1.8, -1.8, 1.8
** Section: Section-ASSEMBLY_PART-1-1_Col_6_Floor_3  Profile: Profile-ASSEMBLY_PART-1-1_Col_6_Floor_3
*Beam General Section, elset=Col_6_Floor_3, density= 2.500e+03, section=RECT
 4.000e-01,  4.000e-01
1.,0.,0.
 3.500e+10,  1.400e+10
*SECTION POINTS
 1.8, 1.8, 1.8, -1.8, -1.8, -1.8, -1.8, 1.8
** Section: Section-ASSEMBLY_PART-1-1_Col_7_Floor_3  Profile: Profile-ASSEMBLY_PART-1-1_Col_7_Floor_3
*Beam General Section, elset=Col_7_Floor_3, density= 2.500e+03, section=RECT
 4.000e-01,  4.000e-01
1.,0.,0.
 3.500e+10,  1.400e+10
*SECTION POINTS
 1.8, 1.8, 1.8, -1.8, -1.8, -1.8, -1.8, 1.8
** Section: Section-ASSEMBLY_PART-1-1_Col_8_Floor_3  Profile: Profile-ASSEMBLY_PART-1-1_Col_8_Floor_3
*Beam General Section, elset=Col_8_Floor_3, density= 2.500e+03, section=RECT
 4.000e-01,  4.000e-01
1.,0.,0.
 3.500e+10,  1.400e+10
*SECTION POINTS
 1.8, 1.8, 1.8, -1.8, -1.8, -1.8, -1.8, 1.8
** Section: Section-ASSEMBLY_PART-1-1_Col_9_Floor_3  Profile: Profile-ASSEMBLY_PART-1-1_Col_9_Floor_3
*Beam General Section, elset=Col_9_Floor_3, density= 2.500e+03, section=RECT
 4.000e-01,  4.000e-01
1.,0.,0.
 3.500e+10,  1.400e+10
*SECTION POINTS
 1.8, 1.8, 1.8, -1.8, -1.8, -1.8, -1.8, 1.8
** Section: Section-ASSEMBLY_PART-1-1_Col_10_Floor_3  Profile: Profile-ASSEMBLY_PART-1-1_Col_10_Floor_3
*Beam General Section, elset=Col_10_Floor_3, density= 2.500e+03, section=RECT
 4.000e-01,  4.000e-01
1.,0.,0.
 3.500e+10,  1.400e+10
*SECTION POINTS
 1.8, 1.8, 1.8, -1.8, -1.8, -1.8, -1.8, 1.8
** Section: Section-ASSEMBLY_PART-1-1_Col_11_Floor_3  Profile: Profile-ASSEMBLY_PART-1-1_Col_11_Floor_3
*Beam General Section, elset=Col_11_Floor_3, density= 2.500e+03, section=RECT
 4.000e-01,  4.000e-01
1.,0.,0.
 3.500e+10,  1.400e+10
*SECTION POINTS
 1.8, 1.8, 1.8, -1.8, -1.8, -1.8, -1.8, 1.8
** Section: Section-ASSEMBLY_PART-1-1_Col_12_Floor_3  Profile: Profile-ASSEMBLY_PART-1-1_Col_12_Floor_3
*Beam General Section, elset=Col_12_Floor_3, density= 2.500e+03, section=RECT
 4.000e-01,  4.000e-01
1.,0.,0.
 3.500e+10,  1.400e+10
*SECTION POINTS
 1.8, 1.8, 1.8, -1.8, -1.8, -1.8, -1.8, 1.8
** Section: Section-ASSEMBLY_PART-1-1_Col_13_Floor_3  Profile: Profile-ASSEMBLY_PART-1-1_Col_13_Floor_3
*Beam General Section, elset=Col_13_Floor_3, density= 2.500e+03, section=RECT
 4.000e-01,  4.000e-01
1.,0.,0.
 3.500e+10,  1.400e+10
*SECTION POINTS
 1.8, 1.8, 1.8, -1.8, -1.8, -1.8, -1.8, 1.8
** Section: Section-ASSEMBLY_PART-1-1_Col_14_Floor_3  Profile: Profile-ASSEMBLY_PART-1-1_Col_14_Floor_3
*Beam General Section, elset=Col_14_Floor_3, density= 2.500e+03, section=RECT
 4.000e-01,  4.000e-01
1.,0.,0.
 3.500e+10,  1.400e+10
*SECTION POINTS
 1.8, 1.8, 1.8, -1.8, -1.8, -1.8, -1.8, 1.8
** Section: Section-ASSEMBLY_PART-1-1_Col_15_Floor_3  Profile: Profile-ASSEMBLY_PART-1-1_Col_15_Floor_3
*Beam General Section, elset=Col_15_Floor_3, density= 2.500e+03, section=RECT
 4.000e-01,  4.000e-01
1.,0.,0.
 3.500e+10,  1.400e+10
*SECTION POINTS
 1.8, 1.8, 1.8, -1.8, -1.8, -1.8, -1.8, 1.8
** Section: Section-ASSEMBLY_PART-1-1_Col_16_Floor_3  Profile: Profile-ASSEMBLY_PART-1-1_Col_16_Floor_3
*Beam General Section, elset=Col_16_Floor_3, density= 2.500e+03, section=RECT
 4.000e-01,  4.000e-01
1.,0.,0.
 3.500e+10,  1.400e+10
*SECTION POINTS
 1.8, 1.8, 1.8, -1.8, -1.8, -1.8, -1.8, 1.8
** Section: Section-ASSEMBLY_PART-1-1_Col_1_Floor_4  Profile: Profile-ASSEMBLY_PART-1-1_Col_1_Floor_4
*Beam General Section, elset=Col_1_Floor_4, density= 2.500e+03, section=RECT
 4.000e-01,  4.000e-01
1.,0.,0.
 3.500e+10,  1.400e+10
*SECTION POINTS
 1.8, 1.8, 1.8, -1.8, -1.8, -1.8, -1.8, 1.8
** Section: Section-ASSEMBLY_PART-1-1_Col_2_Floor_4  Profile: Profile-ASSEMBLY_PART-1-1_Col_2_Floor_4
*Beam General Section, elset=Col_2_Floor_4, density= 2.500e+03, section=RECT
 4.000e-01,  4.000e-01
1.,0.,0.
 3.500e+10,  1.400e+10
*SECTION POINTS
 1.8, 1.8, 1.8, -1.8, -1.8, -1.8, -1.8, 1.8
** Section: Section-ASSEMBLY_PART-1-1_Col_3_Floor_4  Profile: Profile-ASSEMBLY_PART-1-1_Col_3_Floor_4
*Beam General Section, elset=Col_3_Floor_4, density= 2.500e+03, section=RECT
 4.000e-01,  4.000e-01
1.,0.,0.
 3.500e+10,  1.400e+10
*SECTION POINTS
 1.8, 1.8, 1.8, -1.8, -1.8, -1.8, -1.8, 1.8
** Section: Section-ASSEMBLY_PART-1-1_Col_4_Floor_4  Profile: Profile-ASSEMBLY_PART-1-1_Col_4_Floor_4
*Beam General Section, elset=Col_4_Floor_4, density= 2.500e+03, section=RECT
 4.000e-01,  4.000e-01
1.,0.,0.
 3.500e+10,  1.400e+10
*SECTION POINTS
 1.8, 1.8, 1.8, -1.8, -1.8, -1.8, -1.8, 1.8
** Section: Section-ASSEMBLY_PART-1-1_Col_5_Floor_4  Profile: Profile-ASSEMBLY_PART-1-1_Col_5_Floor_4
*Beam General Section, elset=Col_5_Floor_4, density= 2.500e+03, section=RECT
 4.000e-01,  4.000e-01
1.,0.,0.
 3.500e+10,  1.400e+10
*SECTION POINTS
 1.8, 1.8, 1.8, -1.8, -1.8, -1.8, -1.8, 1.8
** Section: Section-ASSEMBLY_PART-1-1_Col_6_Floor_4  Profile: Profile-ASSEMBLY_PART-1-1_Col_6_Floor_4
*Beam General Section, elset=Col_6_Floor_4, density= 2.500e+03, section=RECT
 4.000e-01,  4.000e-01
1.,0.,0.
 3.500e+10,  1.400e+10
*SECTION POINTS
 1.8, 1.8, 1.8, -1.8, -1.8, -1.8, -1.8, 1.8
** Section: Section-ASSEMBLY_PART-1-1_Col_7_Floor_4  Profile: Profile-ASSEMBLY_PART-1-1_Col_7_Floor_4
*Beam General Section, elset=Col_7_Floor_4, density= 2.500e+03, section=RECT
 4.000e-01,  4.000e-01
1.,0.,0.
 3.500e+10,  1.400e+10
*SECTION POINTS
 1.8, 1.8, 1.8, -1.8, -1.8, -1.8, -1.8, 1.8
** Section: Section-ASSEMBLY_PART-1-1_Col_8_Floor_4  Profile: Profile-ASSEMBLY_PART-1-1_Col_8_Floor_4
*Beam General Section, elset=Col_8_Floor_4, density= 2.500e+03, section=RECT
 4.000e-01,  4.000e-01
1.,0.,0.
 3.500e+10,  1.400e+10
*SECTION POINTS
 1.8, 1.8, 1.8, -1.8, -1.8, -1.8, -1.8, 1.8
** Section: Section-ASSEMBLY_PART-1-1_Col_9_Floor_4  Profile: Profile-ASSEMBLY_PART-1-1_Col_9_Floor_4
*Beam General Section, elset=Col_9_Floor_4, density= 2.500e+03, section=RECT
 4.000e-01,  4.000e-01
1.,0.,0.
 3.500e+10,  1.400e+10
*SECTION POINTS
 1.8, 1.8, 1.8, -1.8, -1.8, -1.8, -1.8, 1.8
** Section: Section-ASSEMBLY_PART-1-1_Col_10_Floor_4  Profile: Profile-ASSEMBLY_PART-1-1_Col_10_Floor_4
*Beam General Section, elset=Col_10_Floor_4, density= 2.500e+03, section=RECT
 4.000e-01,  4.000e-01
1.,0.,0.
 3.500e+10,  1.400e+10
*SECTION POINTS
 1.8, 1.8, 1.8, -1.8, -1.8, -1.8, -1.8, 1.8
** Section: Section-ASSEMBLY_PART-1-1_Col_11_Floor_4  Profile: Profile-ASSEMBLY_PART-1-1_Col_11_Floor_4
*Beam General Section, elset=Col_11_Floor_4, density= 2.500e+03, section=RECT
 4.000e-01,  4.000e-01
1.,0.,0.
 3.500e+10,  1.400e+10
*SECTION POINTS
 1.8, 1.8, 1.8, -1.8, -1.8, -1.8, -1.8, 1.8
** Section: Section-ASSEMBLY_PART-1-1_Col_12_Floor_4  Profile: Profile-ASSEMBLY_PART-1-1_Col_12_Floor_4
*Beam General Section, elset=Col_12_Floor_4, density= 2.500e+03, section=RECT
 4.000e-01,  4.000e-01
1.,0.,0.
 3.500e+10,  1.400e+10
*SECTION POINTS
 1.8, 1.8, 1.8, -1.8, -1.8, -1.8, -1.8, 1.8
** Section: Section-ASSEMBLY_PART-1-1_Col_13_Floor_4  Profile: Profile-ASSEMBLY_PART-1-1_Col_13_Floor_4
*Beam General Section, elset=Col_13_Floor_4, density= 2.500e+03, section=RECT
 4.000e-01,  4.000e-01
1.,0.,0.
 3.500e+10,  1.400e+10
*SECTION POINTS
 1.8, 1.8, 1.8, -1.8, -1.8, -1.8, -1.8, 1.8
** Section: Section-ASSEMBLY_PART-1-1_Col_14_Floor_4  Profile: Profile-ASSEMBLY_PART-1-1_Col_14_Floor_4
*Beam General Section, elset=Col_14_Floor_4, density= 2.500e+03, section=RECT
 4.000e-01,  4.000e-01
1.,0.,0.
 3.500e+10,  1.400e+10
*SECTION POINTS
 1.8, 1.8, 1.8, -1.8, -1.8, -1.8, -1.8, 1.8
** Section: Section-ASSEMBLY_PART-1-1_Col_15_Floor_4  Profile: Profile-ASSEMBLY_PART-1-1_Col_15_Floor_4
*Beam General Section, elset=Col_15_Floor_4, density= 2.500e+03, section=RECT
 4.000e-01,  4.000e-01
1.,0.,0.
 3.500e+10,  1.400e+10
*SECTION POINTS
 1.8, 1.8, 1.8, -1.8, -1.8, -1.8, -1.8, 1.8
** Section: Section-ASSEMBLY_PART-1-1_Col_16_Floor_4  Profile: Profile-ASSEMBLY_PART-1-1_Col_16_Floor_4
*Beam General Section, elset=Col_16_Floor_4, density= 2.500e+03, section=RECT
 4.000e-01,  4.000e-01
1.,0.,0.
 3.500e+10,  1.400e+10
*SECTION POINTS
 1.8, 1.8, 1.8, -1.8, -1.8, -1.8, -1.8, 1.8
** Section: Section-ASSEMBLY_PART-1-1_Col_1_Floor_5  Profile: Profile-ASSEMBLY_PART-1-1_Col_1_Floor_5
*Beam General Section, elset=Col_1_Floor_5, density= 2.500e+03, section=RECT
 4.000e-01,  4.000e-01
1.,0.,0.
 3.500e+10,  1.400e+10
*SECTION POINTS
 1.8, 1.8, 1.8, -1.8, -1.8, -1.8, -1.8, 1.8
** Section: Section-ASSEMBLY_PART-1-1_Col_2_Floor_5  Profile: Profile-ASSEMBLY_PART-1-1_Col_2_Floor_5
*Beam General Section, elset=Col_2_Floor_5, density= 2.500e+03, section=RECT
 4.000e-01,  4.000e-01
1.,0.,0.
 3.500e+10,  1.400e+10
*SECTION POINTS
 1.8, 1.8, 1.8, -1.8, -1.8, -1.8, -1.8, 1.8
** Section: Section-ASSEMBLY_PART-1-1_Col_3_Floor_5  Profile: Profile-ASSEMBLY_PART-1-1_Col_3_Floor_5
*Beam General Section, elset=Col_3_Floor_5, density= 2.500e+03, section=RECT
 4.000e-01,  4.000e-01
1.,0.,0.
 3.500e+10,  1.400e+10
*SECTION POINTS
 1.8, 1.8, 1.8, -1.8, -1.8, -1.8, -1.8, 1.8
** Section: Section-ASSEMBLY_PART-1-1_Col_4_Floor_5  Profile: Profile-ASSEMBLY_PART-1-1_Col_4_Floor_5
*Beam General Section, elset=Col_4_Floor_5, density= 2.500e+03, section=RECT
 4.000e-01,  4.000e-01
1.,0.,0.
 3.500e+10,  1.400e+10
*SECTION POINTS
 1.8, 1.8, 1.8, -1.8, -1.8, -1.8, -1.8, 1.8
** Section: Section-ASSEMBLY_PART-1-1_Col_5_Floor_5  Profile: Profile-ASSEMBLY_PART-1-1_Col_5_Floor_5
*Beam General Section, elset=Col_5_Floor_5, density= 2.500e+03, section=RECT
 4.000e-01,  4.000e-01
1.,0.,0.
 3.500e+10,  1.400e+10
*SECTION POINTS
 1.8, 1.8, 1.8, -1.8, -1.8, -1.8, -1.8, 1.8
** Section: Section-ASSEMBLY_PART-1-1_Col_6_Floor_5  Profile: Profile-ASSEMBLY_PART-1-1_Col_6_Floor_5
*Beam General Section, elset=Col_6_Floor_5, density= 2.500e+03, section=RECT
 4.000e-01,  4.000e-01
1.,0.,0.
 3.500e+10,  1.400e+10
*SECTION POINTS
 1.8, 1.8, 1.8, -1.8, -1.8, -1.8, -1.8, 1.8
** Section: Section-ASSEMBLY_PART-1-1_Col_7_Floor_5  Profile: Profile-ASSEMBLY_PART-1-1_Col_7_Floor_5
*Beam General Section, elset=Col_7_Floor_5, density= 2.500e+03, section=RECT
 4.000e-01,  4.000e-01
1.,0.,0.
 3.500e+10,  1.400e+10
*SECTION POINTS
 1.8, 1.8, 1.8, -1.8, -1.8, -1.8, -1.8, 1.8
** Section: Section-ASSEMBLY_PART-1-1_Col_8_Floor_5  Profile: Profile-ASSEMBLY_PART-1-1_Col_8_Floor_5
*Beam General Section, elset=Col_8_Floor_5, density= 2.500e+03, section=RECT
 4.000e-01,  4.000e-01
1.,0.,0.
 3.500e+10,  1.400e+10
*SECTION POINTS
 1.8, 1.8, 1.8, -1.8, -1.8, -1.8, -1.8, 1.8
** Section: Section-ASSEMBLY_PART-1-1_Col_9_Floor_5  Profile: Profile-ASSEMBLY_PART-1-1_Col_9_Floor_5
*Beam General Section, elset=Col_9_Floor_5, density= 2.500e+03, section=RECT
 4.000e-01,  4.000e-01
1.,0.,0.
 3.500e+10,  1.400e+10
*SECTION POINTS
 1.8, 1.8, 1.8, -1.8, -1.8, -1.8, -1.8, 1.8
** Section: Section-ASSEMBLY_PART-1-1_Col_10_Floor_5  Profile: Profile-ASSEMBLY_PART-1-1_Col_10_Floor_5
*Beam General Section, elset=Col_10_Floor_5, density= 2.500e+03, section=RECT
 4.000e-01,  4.000e-01
1.,0.,0.
 3.500e+10,  1.400e+10
*SECTION POINTS
 1.8, 1.8, 1.8, -1.8, -1.8, -1.8, -1.8, 1.8
** Section: Section-ASSEMBLY_PART-1-1_Col_11_Floor_5  Profile: Profile-ASSEMBLY_PART-1-1_Col_11_Floor_5
*Beam General Section, elset=Col_11_Floor_5, density= 2.500e+03, section=RECT
 4.000e-01,  4.000e-01
1.,0.,0.
 3.500e+10,  1.400e+10
*SECTION POINTS
 1.8, 1.8, 1.8, -1.8, -1.8, -1.8, -1.8, 1.8
** Section: Section-ASSEMBLY_PART-1-1_Col_12_Floor_5  Profile: Profile-ASSEMBLY_PART-1-1_Col_12_Floor_5
*Beam General Section, elset=Col_12_Floor_5, density= 2.500e+03, section=RECT
 4.000e-01,  4.000e-01
1.,0.,0.
 3.500e+10,  1.400e+10
*SECTION POINTS
 1.8, 1.8, 1.8, -1.8, -1.8, -1.8, -1.8, 1.8
** Section: Section-ASSEMBLY_PART-1-1_Col_13_Floor_5  Profile: Profile-ASSEMBLY_PART-1-1_Col_13_Floor_5
*Beam General Section, elset=Col_13_Floor_5, density= 2.500e+03, section=RECT
 4.000e-01,  4.000e-01
1.,0.,0.
 3.500e+10,  1.400e+10
*SECTION POINTS
 1.8, 1.8, 1.8, -1.8, -1.8, -1.8, -1.8, 1.8
** Section: Section-ASSEMBLY_PART-1-1_Col_14_Floor_5  Profile: Profile-ASSEMBLY_PART-1-1_Col_14_Floor_5
*Beam General Section, elset=Col_14_Floor_5, density= 2.500e+03, section=RECT
 4.000e-01,  4.000e-01
1.,0.,0.
 3.500e+10,  1.400e+10
*SECTION POINTS
 1.8, 1.8, 1.8, -1.8, -1.8, -1.8, -1.8, 1.8
** Section: Section-ASSEMBLY_PART-1-1_Col_15_Floor_5  Profile: Profile-ASSEMBLY_PART-1-1_Col_15_Floor_5
*Beam General Section, elset=Col_15_Floor_5, density= 2.500e+03, section=RECT
 4.000e-01,  4.000e-01
1.,0.,0.
 3.500e+10,  1.400e+10
*SECTION POINTS
 1.8, 1.8, 1.8, -1.8, -1.8, -1.8, -1.8, 1.8
** Section: Section-ASSEMBLY_PART-1-1_Col_16_Floor_5  Profile: Profile-ASSEMBLY_PART-1-1_Col_16_Floor_5
*Beam General Section, elset=Col_16_Floor_5, density= 2.500e+03, section=RECT
 4.000e-01,  4.000e-01
1.,0.,0.
 3.500e+10,  1.400e+10
*SECTION POINTS
 1.8, 1.8, 1.8, -1.8, -1.8, -1.8, -1.8, 1.8
** Section: Section-ASSEMBLY_PART-1-1_Col_1_Floor_6  Profile: Profile-ASSEMBLY_PART-1-1_Col_1_Floor_6
*Beam General Section, elset=Col_1_Floor_6, density= 2.500e+03, section=RECT
 4.000e-01,  4.000e-01
1.,0.,0.
 3.500e+10,  1.400e+10
*SECTION POINTS
 1.8, 1.8, 1.8, -1.8, -1.8, -1.8, -1.8, 1.8
** Section: Section-ASSEMBLY_PART-1-1_Col_2_Floor_6  Profile: Profile-ASSEMBLY_PART-1-1_Col_2_Floor_6
*Beam General Section, elset=Col_2_Floor_6, density= 2.500e+03, section=RECT
 4.000e-01,  4.000e-01
1.,0.,0.
 3.500e+10,  1.400e+10
*SECTION POINTS
 1.8, 1.8, 1.8, -1.8, -1.8, -1.8, -1.8, 1.8
** Section: Section-ASSEMBLY_PART-1-1_Col_3_Floor_6  Profile: Profile-ASSEMBLY_PART-1-1_Col_3_Floor_6
*Beam General Section, elset=Col_3_Floor_6, density= 2.500e+03, section=RECT
 4.000e-01,  4.000e-01
1.,0.,0.
 3.500e+10,  1.400e+10
*SECTION POINTS
 1.8, 1.8, 1.8, -1.8, -1.8, -1.8, -1.8, 1.8
** Section: Section-ASSEMBLY_PART-1-1_Col_4_Floor_6  Profile: Profile-ASSEMBLY_PART-1-1_Col_4_Floor_6
*Beam General Section, elset=Col_4_Floor_6, density= 2.500e+03, section=RECT
 4.000e-01,  4.000e-01
1.,0.,0.
 3.500e+10,  1.400e+10
*SECTION POINTS
 1.8, 1.8, 1.8, -1.8, -1.8, -1.8, -1.8, 1.8
** Section: Section-ASSEMBLY_PART-1-1_Col_5_Floor_6  Profile: Profile-ASSEMBLY_PART-1-1_Col_5_Floor_6
*Beam General Section, elset=Col_5_Floor_6, density= 2.500e+03, section=RECT
 4.000e-01,  4.000e-01
1.,0.,0.
 3.500e+10,  1.400e+10
*SECTION POINTS
 1.8, 1.8, 1.8, -1.8, -1.8, -1.8, -1.8, 1.8
** Section: Section-ASSEMBLY_PART-1-1_Col_6_Floor_6  Profile: Profile-ASSEMBLY_PART-1-1_Col_6_Floor_6
*Beam General Section, elset=Col_6_Floor_6, density= 2.500e+03, section=RECT
 4.000e-01,  4.000e-01
1.,0.,0.
 3.500e+10,  1.400e+10
*SECTION POINTS
 1.8, 1.8, 1.8, -1.8, -1.8, -1.8, -1.8, 1.8
** Section: Section-ASSEMBLY_PART-1-1_Col_7_Floor_6  Profile: Profile-ASSEMBLY_PART-1-1_Col_7_Floor_6
*Beam General Section, elset=Col_7_Floor_6, density= 2.500e+03, section=RECT
 4.000e-01,  4.000e-01
1.,0.,0.
 3.500e+10,  1.400e+10
*SECTION POINTS
 1.8, 1.8, 1.8, -1.8, -1.8, -1.8, -1.8, 1.8
** Section: Section-ASSEMBLY_PART-1-1_Col_8_Floor_6  Profile: Profile-ASSEMBLY_PART-1-1_Col_8_Floor_6
*Beam General Section, elset=Col_8_Floor_6, density= 2.500e+03, section=RECT
 4.000e-01,  4.000e-01
1.,0.,0.
 3.500e+10,  1.400e+10
*SECTION POINTS
 1.8, 1.8, 1.8, -1.8, -1.8, -1.8, -1.8, 1.8
** Section: Section-ASSEMBLY_PART-1-1_Col_9_Floor_6  Profile: Profile-ASSEMBLY_PART-1-1_Col_9_Floor_6
*Beam General Section, elset=Col_9_Floor_6, density= 2.500e+03, section=RECT
 4.000e-01,  4.000e-01
1.,0.,0.
 3.500e+10,  1.400e+10
*SECTION POINTS
 1.8, 1.8, 1.8, -1.8, -1.8, -1.8, -1.8, 1.8
** Section: Section-ASSEMBLY_PART-1-1_Col_10_Floor_6  Profile: Profile-ASSEMBLY_PART-1-1_Col_10_Floor_6
*Beam General Section, elset=Col_10_Floor_6, density= 2.500e+03, section=RECT
 4.000e-01,  4.000e-01
1.,0.,0.
 3.500e+10,  1.400e+10
*SECTION POINTS
 1.8, 1.8, 1.8, -1.8, -1.8, -1.8, -1.8, 1.8
** Section: Section-ASSEMBLY_PART-1-1_Col_11_Floor_6  Profile: Profile-ASSEMBLY_PART-1-1_Col_11_Floor_6
*Beam General Section, elset=Col_11_Floor_6, density= 2.500e+03, section=RECT
 4.000e-01,  4.000e-01
1.,0.,0.
 3.500e+10,  1.400e+10
*SECTION POINTS
 1.8, 1.8, 1.8, -1.8, -1.8, -1.8, -1.8, 1.8
** Section: Section-ASSEMBLY_PART-1-1_Col_12_Floor_6  Profile: Profile-ASSEMBLY_PART-1-1_Col_12_Floor_6
*Beam General Section, elset=Col_12_Floor_6, density= 2.500e+03, section=RECT
 4.000e-01,  4.000e-01
1.,0.,0.
 3.500e+10,  1.400e+10
*SECTION POINTS
 1.8, 1.8, 1.8, -1.8, -1.8, -1.8, -1.8, 1.8
** Section: Section-ASSEMBLY_PART-1-1_Col_13_Floor_6  Profile: Profile-ASSEMBLY_PART-1-1_Col_13_Floor_6
*Beam General Section, elset=Col_13_Floor_6, density= 2.500e+03, section=RECT
 4.000e-01,  4.000e-01
1.,0.,0.
 3.500e+10,  1.400e+10
*SECTION POINTS
 1.8, 1.8, 1.8, -1.8, -1.8, -1.8, -1.8, 1.8
** Section: Section-ASSEMBLY_PART-1-1_Col_14_Floor_6  Profile: Profile-ASSEMBLY_PART-1-1_Col_14_Floor_6
*Beam General Section, elset=Col_14_Floor_6, density= 2.500e+03, section=RECT
 4.000e-01,  4.000e-01
1.,0.,0.
 3.500e+10,  1.400e+10
*SECTION POINTS
 1.8, 1.8, 1.8, -1.8, -1.8, -1.8, -1.8, 1.8
** Section: Section-ASSEMBLY_PART-1-1_Col_15_Floor_6  Profile: Profile-ASSEMBLY_PART-1-1_Col_15_Floor_6
*Beam General Section, elset=Col_15_Floor_6, density= 2.500e+03, section=RECT
 4.000e-01,  4.000e-01
1.,0.,0.
 3.500e+10,  1.400e+10
*SECTION POINTS
 1.8, 1.8, 1.8, -1.8, -1.8, -1.8, -1.8, 1.8
** Section: Section-ASSEMBLY_PART-1-1_Col_16_Floor_6  Profile: Profile-ASSEMBLY_PART-1-1_Col_16_Floor_6
*Beam General Section, elset=Col_16_Floor_6, density= 2.500e+03, section=RECT
 4.000e-01,  4.000e-01
1.,0.,0.
 3.500e+10,  1.400e+10
*SECTION POINTS
 1.8, 1.8, 1.8, -1.8, -1.8, -1.8, -1.8, 1.8
*End Part
**
**
** ASSEMBLY
**
*Assembly, name=Assembly
**
*Instance, name=PART-1-1, part=PART-1-1
*End Instance
**
*End Assembly
**
** MATERIALS
**
*Material, name=CELLAR_MAT
*Density
2500.,
*Elastic
 2.5e+10, 0.2
*Material, name=FLOOR_1
*Density
  2.500e+03,
*Elastic
  3.500e+10,  2.500e-01
*Material, name=FLOOR_2
*Density
  2.500e+03,
*Elastic
  3.500e+10,  2.500e-01
*Material, name=FLOOR_3
*Density
  2.500e+03,
*Elastic
  3.500e+10,  2.500e-01
*Material, name=FLOOR_4
*Density
  2.500e+03,
*Elastic
  3.500e+10,  2.500e-01
*Material, name=FLOOR_5
*Density
  2.500e+03,
*Elastic
  3.500e+10,  2.500e-01
*Material, name=FLOOR_6
*Density
  2.500e+03,
*Elastic
  3.500e+10,  2.500e-01
*Material, name=SOIL
*Density
1800.,
*Elastic
 5e+09, 0.2
*Material, name=STAIRS_1
*Density
  2.500e+03,
*Elastic
  3.500e+10,  2.500e-01
*Material, name=STAIRS_2
*Density
  2.500e+03,
*Elastic
  3.500e+10,  2.500e-01
*Material, name=STAIRS_3
*Density
  2.500e+03,
*Elastic
  3.500e+10,  2.500e-01
*Material, name=STAIRS_4
*Density
  2.500e+03,
*Elastic
  3.500e+10,  2.500e-01
*Material, name=STAIRS_5
*Density
  2.500e+03,
*Elastic
  3.500e+10,  2.500e-01
*Material, name=STAIRS_6
*Density
  2.500e+03,
*Elastic
  3.500e+10,  2.500e-01
*Material, name=STAIRS_CEIL
*Density
  2.500e+03,
*Elastic
  3.500e+10,  2.500e-01
**
** PHYSICAL CONSTANTS
**
*Physical Constants, absolute zero=0., stefan boltzmann=0.
**
** BOUNDARY CONDITIONS
**
** Name: BC-1 Type: Displacement/Rotation
*Boundary
PART-1-1.Soil_nodes, 1, 1
PART-1-1.Soil_nodes, 2, 2
PART-1-1.Soil_nodes, 3, 3
PART-1-1.Soil_nodes, 4, 4
PART-1-1.Soil_nodes, 5, 5
PART-1-1.Soil_nodes, 6, 6
** ----------------------------------------------------------------
**
** STEP: Self_weight
**
*Step, name=Self_weight
*Static
1., 1., 1e-05, 1.
**
** LOADS
**
** Name: Load-1   Type: Gravity
*Dload
, GRAV, 9.81, 0., 0., -1.
**
** OUTPUT REQUESTS
**
*Restart, write, frequency=0
**
** FIELD OUTPUT: F-Output-1
**
*Output, field, variable=PRESELECT
**
** HISTORY OUTPUT: H-Output-1
**
*Output, history, variable=PRESELECT
*End Step
** ----------------------------------------------------------------
**
** STEP: Side_wind
**
*Step, name=Side_wind
*Static
1., 1., 1e-05, 1.
**
** LOADS
**
** Name: Wind_ceil   Type: Pressure
*Dsload
PART-1-1.Side_ceil, P, <p_max>
** Name: Wind_floor1   Type: Concentrated force
*Cload
PART-1-1.SIDE_FLOOR1, 2, <nodal_force_floor1>
** Name: Wind_floor2   Type: Concentrated force
*Cload
PART-1-1.SIDE_FLOOR2, 2, <nodal_force_floor2>
** Name: Wind_floor3   Type: Concentrated force
*Cload
PART-1-1.SIDE_FLOOR3, 2, <nodal_force_floor3>
** Name: Wind_floor4   Type: Concentrated force
*Cload
PART-1-1.SIDE_FLOOR4, 2, <nodal_force_floor4>
** Name: Wind_floor5   Type: Concentrated force
*Cload
PART-1-1.SIDE_FLOOR5, 2, <nodal_force_floor5>
** Name: Wind_floor6   Type: Concentrated force
*Cload
PART-1-1.SIDE_FLOOR6, 2, <nodal_force_floor6>
**
** OUTPUT REQUESTS
**
*Restart, write, frequency=0
**
** FIELD OUTPUT: F-Output-1
**
*Output, field
*Node Output
U,
*Element Output, directions=YES
MISESMAX, S
*End Step
