*********************************************************************
** Abaqus/FROMNASTRAN Version 6.7-1
**
** reading bulk data from: test.bdf
**  creating ABAQUS input: test.inp
** writing diagnostics to: test.log
**
**  environment variables: fromnastran_wtmass_fixup <not present>
**                       : fromnastran_distribution <not present>
**                       : fromnastran_pbar_zero_reset <not present>
**                       : fromnastran_loadcases <not present>
**                       : fromnastran_surface_based_coupling <not present>
**                       : fromnastran_cquad4 <not present>
**                       : fromnastran_chexa <not present>
**                       : fromnastran_ctetra <not present>
**                       : fromnastran_cbar <not present>
**                       : fromnastran_beam_offset_coupling <not present>
**                       : fromnastran_beam_orientation_vector <not present>
**
** command line arguments: wtmass_fixup <not present>
**                       : distribution <not present>
**                       : pbar_zero_reset <not present, using default=1e-20
**                       : loadcases <not present>
**                       : surface_based_coupling <not present>
**                       : cquad4 <not present>
**                       : chexa <not present>
**                       : ctetra <not present>
**                       : cbar <not present>
**                       : beam_offset_coupling <not present>
**                       : beam_orientation_vector <not present>
**
** PARAM,WTMASS will NOT be used to adjust mass and density
** *DISTRIBUTION will be used for shell offsets, orientations, and thicknesses
** Zero PBAR/PBEAM cross sectional parameters will be reset to 1e-20
** SUBCASEs for SOL 101 and 108 will be General STEPs
** Rigid links will be modeled using non-surface-based constraints
** Beam orientations will use a third node on the element connectivity
** Beam offsets will be modeled using rigid couplings and extra nodes
**
** --------------------------------
** NASTRAN Case Control entities processed:
**      keyword   number
** ------------   ------
**   BEGIN BULK        1
** DISPLACEMENT        1
**         LOAD        1
**          SPC        1
**      SUBCASE        1
** --------------------------------
** NASTRAN Bulk Data processed:
**      keyword   number
** ------------   ------
**       CTETRA    18865
**      ENDDATA        1
**         GRAV        1
**         GRID     4286
**         LOAD        1
**         MAT1        3
**       PSOLID        3
**         SPC1        1
**       SPCADD        1
**
** ---------------------------------------------------
** ---- *NODE ----------------------------------------
** ---------------------------------------------------
**
** following nodes were defined in the global coordinate system
**
*SYSTEM
**
*NODE, SYSTEM=R
       1,     -17.344,          0.,     -12.066
       2,     -17.344,          0.,      12.934
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**
** ---------------------------------------------------
** ---- *MATERIAL ------------------------------------
** ---------------------------------------------------
**
** material data from MAT1 with MID = 1
**
*MATERIAL, NAME=MAT_MID_1
*ELASTIC
1.0000e+00 , 0.3
*DENSITY
8e-06,
**
** material data from MAT1 with MID = 2
**
*MATERIAL, NAME=MAT_MID_2
*ELASTIC
1.0000e+00 , 0.3
*DENSITY
8e-06,
**
** material data from MAT1 with MID = 3
**
*MATERIAL, NAME=MAT_MID_3
*ELASTIC
1.0000e+00 , 0.3
*DENSITY
8e-06,
**
** ---------------------------------------------------
** ---- SOLID elements -------------------------------
** ---------------------------------------------------
**
** following elements refer to a PSOLID entry with PID = 1
**
*SOLID SECTION, ELSET=PSOLID_1, MATERIAL=MAT_MID_1
**
*ELEMENT, TYPE=C3D4, ELSET=PSOLID_1
13, 3955, 3954, 3953, 3952
14, 3951, 3950, 3952, 3955
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**
** following elements refer to a PSOLID entry with PID = 2
**
*SOLID SECTION, ELSET=PSOLID_2, MATERIAL=MAT_MID_2
**
*ELEMENT, TYPE=C3D4, ELSET=PSOLID_2
2, 3976, 3975, 3974, 3973
9, 1787, 3962, 3961, 3960
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**
** following elements refer to a PSOLID entry with PID = 3
**
*SOLID SECTION, ELSET=PSOLID_3, MATERIAL=MAT_MID_3
**
*ELEMENT, TYPE=C3D4, ELSET=PSOLID_3
1, 3978, 3977, 4076, 4030
3, 3972, 4076, 3977, 4077
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**
** elset ALL_3DSOLID contains 18865 elements in 3 elsets
*ELSET, ELSET=ALL_3DSOLID
PSOLID_1,
PSOLID_2,
PSOLID_3,
**
** elset ALL_MASSIVE_ELEMENTS contains all 18865 elements that can have mass
*ELSET, ELSET=ALL_MASSIVE_ELEMENTS
ALL_3DSOLID,

*STEP
*STATIC
*NODE PRINT
U,
*BOUNDARY, OP=NEW
    1777, 1,6, 0.
     616, 1,6, 0.
    1779, 1,6, 0.
    4120, 1,6, 0.
    4276, 1,6, 0.
    4286, 1,6, 0.
*DLOAD, OP=NEW
ALL_MASSIVE_ELEMENTS, GRAV, 3.5e+08, 0., 1., 0.
*END STEP
